// SBML level 3 version 1

function heavx(x)
  (abs(x) + x)/(2*abs(x) + 1e-5);
end

function modulus(a, b)
  a - b*floor(a/b);
end

function minf(V, Vm, sm)
  1/(1 + exp((Vm - V)/sm));
end

model ISR()

  // Compartments:
  compartment default_compartment = 1;

  // Species:
  species SEdel in default_compartment = 0;
  species avISR in default_compartment = 0;
  species secretion_calcium_V in default_compartment = secretion_calcium_membranePotential_Vburst;
  species secretion_Ci in default_compartment = 0.06274;
  species secretion_Cmd in default_compartment = 0.0674;
  species secretion_N1 in default_compartment = 14.71376;
  species secretion_N2 in default_compartment = 0.612519;
  species secretion_N3 in default_compartment = 0.0084499;
  species secretion_N4 in default_compartment = 5.098857e-6;
  species secretion_N5 in default_compartment = 24.539936;
  species secretion_N6 in default_compartment = 218.017777;
  species secretion_NF in default_compartment = 0.003399;
  species secretion_NR in default_compartment = 0.50988575;
  species SE in default_compartment = 0;

  // Parameters:
  secretion_ts = 60;
  secretion_calcium_ts = 60;
  secretion_calcium_Jsercamax = 41;
  secretion_calcium_Kserca = 0.27;
  secretion_calcium_Jpmcamax = 21;
  secretion_calcium_Kpmca = 0.5;
  secretion_calcium_Jncx0 = 18.67;
  secretion_calcium_Jleak = -0.94;
  secretion_calcium_membranePotential_PI = 3.141593;
  secretion_calcium_membranePotential_Vrest = -70;
  secretion_calcium_membranePotential_Vburst = -20;
  secretion_calcium_membranePotential_tstep = 0;
  secretion_calcium_membranePotential_ton = 6;
  secretion_calcium_membranePotential_toff = 6;
  secretion_calcium_membranePotential_period = secretion_calcium_membranePotential_ton + secretion_calcium_membranePotential_toff;
  secretion_calcium_membranePotential_phase_off = secretion_calcium_membranePotential_ton/secretion_calcium_membranePotential_period*2*secretion_calcium_membranePotential_PI;
  secretion_calcium_gL = 250;
  secretion_calcium_Vm = -20;
  secretion_calcium_sm = 5;
  secretion_calcium_Vca = 25;
  secretion_calcium_alpha = 5.18e-15;
  secretion_calcium_vcell = 1.15e-12;
  secretion_calcium_vmd = 4.2e-15;
  secretion_calcium_fv = secretion_calcium_vmd/secretion_calcium_vcell;
  secretion_calcium_fi = 0.01;
  secretion_calcium_fmd = 0.01;
  secretion_calcium_B = 200;
  secretion_GlucFact = 0;
  secretion_k1 = 20;
  secretion_km1 = 100;
  secretion_r1 = 0.6;
  secretion_rm1 = 1;
  secretion_r20 = 0.006;
  secretion_rm2 = 0.001;
  secretion_r30 = 1.205;
  secretion_rm3 = 0.0001;
  secretion_u1 = 2000;
  secretion_u2 = 3;
  secretion_u3 = 0.02;
  secretion_Kp = 2.3;
  secretion_Kp2 = 2.3;

  // Assignment rules:
  secretion_calcium_IL := secretion_calcium_gL*minf(secretion_calcium_V, secretion_calcium_Vm, secretion_calcium_sm)*(secretion_calcium_V - secretion_calcium_Vca);
  secretion_calcium_IR := 0.25*secretion_calcium_IL;
  secretion_calcium_JL := secretion_calcium_alpha*secretion_calcium_IL/secretion_calcium_vmd;
  secretion_calcium_JR := secretion_calcium_alpha*secretion_calcium_IR/secretion_calcium_vcell;
  secretion_calcium_Jserca := secretion_calcium_Jsercamax*secretion_Ci^2/(secretion_calcium_Kserca^2 + secretion_Ci^2);
  secretion_calcium_Jpmca := secretion_calcium_Jpmcamax*secretion_Ci/(secretion_calcium_Kpmca + secretion_Ci);
  secretion_calcium_Jncx := secretion_calcium_Jncx0*(secretion_Ci - 0.25);
  secretion_calcium_L := secretion_calcium_Jserca + secretion_calcium_Jpmca + secretion_calcium_Jncx + secretion_calcium_Jleak;
  secretion_calcium_membranePotential_phase := 2*secretion_calcium_membranePotential_PI*time/secretion_calcium_membranePotential_period;
  secretion_calcium_dCmd := secretion_calcium_ts*(-secretion_calcium_fmd*secretion_calcium_JL - secretion_calcium_fmd*secretion_calcium_B*(secretion_Cmd - secretion_Ci));
  secretion_calcium_dCi := secretion_calcium_ts*(-secretion_calcium_fi*secretion_calcium_JR + secretion_calcium_fv*secretion_calcium_fi*secretion_calcium_B*(secretion_Cmd - secretion_Ci) - secretion_calcium_fi*secretion_calcium_L);
  secretion_r2 := secretion_r20*secretion_Ci/(secretion_Ci + secretion_Kp2);
  secretion_r3 := secretion_GlucFact*secretion_r30*secretion_Ci/(secretion_Ci + secretion_Kp);
  phase := 2*3.1415*(time/2);

  // Reactions:
  secretion_calcium__J0: -> secretion_Cmd; secretion_calcium_dCmd;
  secretion_calcium__J1: -> secretion_Ci; secretion_calcium_dCi;
  secretion__J0: -> secretion_N1; secretion_ts*(-(3*secretion_k1*secretion_Cmd + secretion_rm1)*secretion_N1 + secretion_km1*secretion_N2 + secretion_r1*secretion_N5);  // modifiers: secretion_N2, secretion_N5, secretion_Cmd
  secretion__J1: -> secretion_N2; secretion_ts*(3*secretion_k1*secretion_Cmd*secretion_N1 - (2*secretion_k1*secretion_Cmd + secretion_km1)*secretion_N2 + 2*secretion_km1*secretion_N3);  // modifiers: secretion_N1, secretion_N3, secretion_Cmd
  secretion__J2: -> secretion_N3; secretion_ts*(2*secretion_k1*secretion_Cmd*secretion_N2 - (2*secretion_km1 + secretion_k1*secretion_Cmd)*secretion_N3 + 3*secretion_km1*secretion_N4);  // modifiers: secretion_N2, secretion_N4, secretion_Cmd
  secretion__J3: -> secretion_N4; secretion_ts*(secretion_k1*secretion_Cmd*secretion_N3 - (3*secretion_km1 + secretion_u1)*secretion_N4);  // modifiers: secretion_N3, secretion_Cmd
  secretion__J4: -> secretion_N5; secretion_ts*(secretion_rm1*secretion_N1 - (secretion_r1 + secretion_rm2)*secretion_N5 + secretion_r2*secretion_N6);  // modifiers: secretion_N1, secretion_N6
  secretion__J5: -> secretion_N6; secretion_ts*(secretion_r3 + secretion_rm2*secretion_N5 - (secretion_rm3 + secretion_r2)*secretion_N6);  // modifiers: secretion_N5
  secretion__J6: -> secretion_NF; secretion_ts*(secretion_u1*secretion_N4 - secretion_u2*secretion_NF);  // modifiers: secretion_N4
  secretion__J7: -> secretion_NR; secretion_ts*(secretion_u2*secretion_NF - secretion_u3*secretion_NR);  // modifiers: secretion_NF
  secretion__J8: -> SE; secretion_ts*secretion_u3*secretion_NR;  // modifiers: secretion_NR

  // Events:
  secretion_calcium_membranePotential__E0: at (sin(secretion_calcium_membranePotential_phase) > 0): secretion_calcium_V = secretion_calcium_membranePotential_Vburst;
  secretion_calcium_membranePotential__E1: at (sin(secretion_calcium_membranePotential_phase) < 0): secretion_calcium_V = secretion_calcium_membranePotential_Vrest;
  _E0: at (sin(phase) > 0), priority = 1: avISR = 4.5*(SE - SEdel);
  _E1: at (sin(phase) > 0), priority = 0: SEdel = SE;
end
