// SBML level 3 version 1

function minf(V, Vm, sm)
  1/(1 + exp((Vm - V)/sm));
end

function heavx(x)
  (abs(x) + x)/(2*abs(x) + 1e-5);
end

function modx(a, b)
  a - b*floor(a/b);
end

model Secretion()

  // Compartments:
  compartment default_compartment = 1;

  // Species:
  species calcium_V in default_compartment;
  species Ci in default_compartment = 0.06274;
  species Cmd in default_compartment = 0.0674;
  species N1 in default_compartment = 14.71376;
  species N2 in default_compartment = 0.612519;
  species N3 in default_compartment = 0.0084499;
  species N4 in default_compartment = 5.098857e-6;
  species N5 in default_compartment = 24.539936;
  species N6 in default_compartment = 218.017777;
  species NF in default_compartment = 0.003399;
  species NR in default_compartment = 0.50988575;
  species SE in default_compartment = 0;

  // Parameters:
  ts = 60;
  calcium_ts = 60;
  calcium_Jsercamax = 41;
  calcium_Kserca = 0.27;
  calcium_Jpmcamax = 21;
  calcium_Kpmca = 0.5;
  calcium_Jncx0 = 18.67;
  calcium_Jleak = -0.94;
  calcium_membranePotential_Vrest = -70;
  calcium_membranePotential_Vburst = -20;
  calcium_membranePotential_tstep = 0;
  calcium_membranePotential_ton = 6;
  calcium_membranePotential_toff = 6;
  calcium_membranePotential_tcycle = 12;
  calcium_gL = 250;
  calcium_Vm = -20;
  calcium_sm = 5;
  calcium_Vca = 25;
  calcium_alpha = 5.18e-15;
  calcium_vcell = 1.15e-12;
  calcium_vmd = 4.2e-15;
  calcium_fv = 0.0036522;
  calcium_fi = 0.01;
  calcium_fmd = 0.01;
  calcium_B = 200;
  GlucFact = 0;
  k1 = 20;
  km1 = 100;
  r1 = 0.6;
  rm1 = 1;
  r20 = 0.006;
  rm2 = 0.001;
  r30 = 1.205;
  rm3 = 0.0001;
  u1 = 2000;
  u2 = 3;
  u3 = 0.02;
  Kp = 2.3;
  Kp2 = 2.3;

  // Assignment rules:
  calcium_V := calcium_membranePotential_Vrest + (calcium_membranePotential_Vburst - calcium_membranePotential_Vrest)*(heavx(modx(time, calcium_membranePotential_tcycle)) - heavx(modx(time, calcium_membranePotential_tcycle) - calcium_membranePotential_toff));
  calcium_IL := calcium_gL*minf(calcium_V, calcium_Vm, calcium_sm)*(calcium_V - calcium_Vca);
  calcium_IR := 0.25*calcium_IL;
  calcium_JL := calcium_alpha*calcium_IL/calcium_vmd;
  calcium_JR := calcium_alpha*calcium_IR/calcium_vcell;
  calcium_Jserca := calcium_Jsercamax*Ci^2/(calcium_Kserca^2 + Ci^2);
  calcium_Jpmca := calcium_Jpmcamax*Ci/(calcium_Kpmca + Ci);
  calcium_Jncx := calcium_Jncx0*(Ci - 0.25);
  calcium_L := calcium_Jserca + calcium_Jpmca + calcium_Jncx + calcium_Jleak;
  calcium_dCmd := calcium_ts*(-calcium_fmd*calcium_JL - calcium_fmd*calcium_B*(Cmd - Ci));
  calcium_dCi := calcium_ts*(-calcium_fi*calcium_JR + calcium_fv*calcium_fi*calcium_B*(Cmd - Ci) - calcium_fi*calcium_L);
  r2 := r20*Ci/(Ci + Kp2);
  r3 := GlucFact*r30*Ci/(Ci + Kp);

  // Reactions:
  calcium__J0: -> Cmd; calcium_dCmd;
  calcium__J1: -> Ci; calcium_dCi;
  _J0: -> N1; ts*(-(3*k1*Cmd + rm1)*N1 + km1*N2 + r1*N5);  // modifiers: Cmd, N5, N2
  _J1: -> N2; ts*(3*k1*Cmd*N1 - (2*k1*Cmd + km1)*N2 + 2*km1*N3);  // modifiers: Cmd, N3, N1
  _J2: -> N3; ts*(2*k1*Cmd*N2 - (2*km1 + k1*Cmd)*N3 + 3*km1*N4);  // modifiers: Cmd, N4, N2
  _J3: -> N4; ts*(k1*Cmd*N3 - (3*km1 + u1)*N4);  // modifiers: Cmd, N3
  _J4: -> N5; ts*(rm1*N1 - (r1 + rm2)*N5 + r2*N6);  // modifiers: N6, N1
  _J5: -> N6; ts*(r3 + rm2*N5 - (rm3 + r2)*N6);  // modifiers: N5
  _J6: -> NF; ts*(u1*N4 - u2*NF);  // modifiers: N4
  _J7: -> NR; ts*(u2*NF - u3*NR);  // modifiers: NF
  _J8: -> SE; ts*u3*NR;  // modifiers: NR
end
