// SBML level 3 version 1

function heavx(x)
  (abs(x) + x)/(2*abs(x) + 1e-5);
end

function modulus(a, b)
  a - b*floor(a/b);
end

function minf(V, Vm, sm)
  1/(1 + exp((Vm - V)/sm));
end

model Calcium()

  // Compartments:
  compartment default_compartment = 1;

  // Species:
  species V in default_compartment = membranePotential_Vburst;
  species Ci in default_compartment = 0.06274;
  species Cmd in default_compartment = 0.0674;

  // Parameters:
  ts = 60;
  Jsercamax = 41;
  Kserca = 0.27;
  Jpmcamax = 21;
  Kpmca = 0.5;
  Jncx0 = 18.67;
  Jleak = -0.94;
  membranePotential_PI = 3.141593;
  membranePotential_Vrest = -70;
  membranePotential_Vburst = -20;
  membranePotential_tstep = 0;
  membranePotential_ton = 6;
  membranePotential_toff = 6;
  membranePotential_period = membranePotential_ton + membranePotential_toff;
  membranePotential_phase_off = membranePotential_ton/membranePotential_period*2*membranePotential_PI;
  gL = 250;
  Vm = -20;
  sm = 5;
  Vca = 25;
  alpha = 5.18e-15;
  vcell = 1.15e-12;
  vmd = 4.2e-15;
  fv = vmd/vcell;
  fi = 0.01;
  fmd = 0.01;
  B = 200;

  // Assignment rules:
  IL := gL*minf(V, Vm, sm)*(V - Vca);
  IR := 0.25*IL;
  JL := alpha*IL/vmd;
  JR := alpha*IR/vcell;
  Jserca := Jsercamax*Ci^2/(Kserca^2 + Ci^2);
  Jpmca := Jpmcamax*Ci/(Kpmca + Ci);
  Jncx := Jncx0*(Ci - 0.25);
  L := Jserca + Jpmca + Jncx + Jleak;
  membranePotential_phase := 2*membranePotential_PI*time/membranePotential_period;
  dCmd := ts*(-fmd*JL - fmd*B*(Cmd - Ci));
  dCi := ts*(-fi*JR + fv*fi*B*(Cmd - Ci) - fi*L);

  // Reactions:
  _J0: -> Cmd; dCmd;
  _J1: -> Ci; dCi;

  // Events:
  membranePotential__E0: at (sin(membranePotential_phase) > 0): V = membranePotential_Vburst;
  membranePotential__E1: at (sin(membranePotential_phase) < 0): V = membranePotential_Vrest;
end
